# [component: outputs M]
σ := 0.5
η := 0.1
rows(M) = 201
i := 0 .. 200
x[i] := 0.1*i - 1
net(x, c) := e^(-1/(2*σ)*(c - x)^2)
c := [-0.8; -0.6; -0.4; -0.2; 0; 0.2; 0.4; 0.6; 0.8]
w1 := [0.5; 0.5; 0.5; 0.5; 0.5; 0.5; 0.5; 0.5; 0.5]
N := net(x[0], c) = [0.960789; 0.852144; 0.697676; 0.527292; 0.367879; 0.236928; 0.140858; 0.0773047; 0.0391639]
y := N*w1 = 1.95002
δ := x[0] - y = -2.95002
Δw1 := η*δ*N = [-0.283435; -0.251384; -0.205816; -0.155552; -0.108525; -0.0698941; -0.0415535; -0.022805; -0.0115534]
w11 := w1 + Δw1 = [0.216565; 0.248616; 0.294184; 0.344448; 0.391475; 0.430106; 0.458447; 0.477195; 0.488447]
w1 :=
    for i ∈ 0 .. 200
        N ← net(x[i], c)
        y ← N*w1
        δ ← x[i] - y
        Δw1 ← η*δ*N
        w11 ← w1 + Δw1
        w1 ← w11
w1 = [-0.406674; -0.365546; -0.262465; -0.111266; 0.0723125; 0.27677; 0.498183; 0.739949; 1.00983]
n := 10000
w1 :=
    for j ∈ 0 .. n
        for i ∈ 0 .. 200
            N ← net(M[i], c)
            y ← N*w1
            δ ← M[i] - y
            Δw1 ← η*δ*N
            w11 ← w1 + Δw1
            w1 ← w11
x := 0, 1 .. 200
w1 = [-23.8753; 43.0977; -7.12499; -30.0552; 0.903175; 29.719; 5.07123; -41.0089; 23.1602]
x := -1, -0.99 .. 1
h := 0 .. 8
y(x, c, w1) := sum(net(x, c)[h]*w1[h], h)
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y(x, c, w1) = [
    -1.2078; -1.19206; -1.1762; -1.16024; -1.14418; -1.12804; -1.11182; -1.09554; -1.07921; -1.06284
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]
# [component: inputs y(x, c, w1)]
