σ := 0.5
η := 0.1
c := [-0.8; -0.6; -0.4; -0.2; 0; 0.2; 0.4; 0.6; 0.8]
w1 := [0.5; 0.5; 0.5; 0.5; 0.5; 0.5; 0.5; 0.5; 0.5]
i := 0 .. 20
x[i] := 0.1*i - 1
net(x, c) := e^(-1/(2*σ)*(c - x)^2)
f(x) := 0.5*x + 2*x^2 - x^3
dx := [5.72331102243; 4.26399207103; 2.90375292193; 2.2044729839; 1.06132123589; 0.488426483228; 0.836766473573; 0.0280414289169; 0.867225947301; -0.928172716407; 0.0394985119188; 0.457238538043; 1.38969913794; 1.27890571536; 0.549417804258; 1.18869129176; 3.55001962981; 3.1875996977; 3.26272623495; 3.24001221825; 3.49129504204]
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N := net(-1, c) = [0.960789; 0.852144; 0.697676; 0.527292; 0.367879; 0.236928; 0.140858; 0.0773047; 0.0391639]
y := N*w1 = 1.95002
δ := f(x[0]) - y = 0.549982
Δw1 := η*δ*N = [0.0528417; 0.0468664; 0.0383709; 0.0290001; 0.0202327; 0.0130306; 0.00774696; 0.00425162; 0.00215394]
w11 := w1 + Δw1 = [0.552842; 0.546866; 0.538371; 0.529; 0.520233; 0.513031; 0.507747; 0.504252; 0.502154]
w1 :=
    for i ∈ 0 .. 20
        N ← net(x[i], c)
        y ← N*w1
        δ ← dx[i] - y
        Δw1 ← η*δ*N
        w11 ← w1 + Δw1
        w1 ← w11
w1 = [0.160161; 0.110504; 0.12807; 0.221992; 0.380445; 0.573288; 0.76142; 0.908884; 0.992903]
n := 100000
w1 :=
    for j ∈ 0 .. n
        for i ∈ 0 .. 20
            N ← net(x[i], c)
            y ← N*w1
            δ ← dx[i] - y
            Δw1 ← η*δ*N
            w11 ← w1 + Δw1
            w1 ← w11
w1 = [36.5923; -28.5574; -21.792; 6.98731; 17.7625; 4.39642; -11.9867; -9.4379; 13.8383]
X := -1, -0.9 .. 1
h := 0 .. 8
y(X, c, w1) := sum(net(X, c)[h]*w1[h], h)
i := 0 .. 20
x[i] := 0.1*i - 1
f(x) := 0.5*x + 2*x^2 - x^3
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y(X, c, w1) = [5.00308; 4.213; 3.34334; 2.46048; 1.63088; 0.913821; 0.355199; -0.0165235; -0.191826; -0.179057; -0.00123334; 0.308494; 0.711796; 1.1697; 1.64606; 2.10978; 2.53574; 2.90472; 3.20291; 3.42116; 3.55441]
